Wed Jul  8 13:39:49 PDT 2020
;; 1. Based on:
;; 2. Description: Model 6 - 2cmt model with covariates
;; x1. Author: user
; Reference:
; Nonlinear Mixed‐Effects Model Development and Simulation Using nlmixr and Related R Open‐Source Packages
; https://doi.org/10.1002/psp4.12445
$PROBLEM    examplomycin
$INPUT      ID TIME DV CMT WT SEX AMT EVID PHASE=DROP
$DATA      examplomycin2.csv IGNORE=@
$SUBROUTINE ADVAN13 TOL=9
$MODEL      NCOMP=3
$PK
NMID = ID

; Covariates
WT2 = WT
IF(WT.LE.0) WT2 = 70

MU_1 = LOG(THETA(1)) + THETA(11) * LOG(WT2/70)
CL   = EXP(MU_1 + ETA(1))

MU_2 = LOG(THETA(2)) + THETA(12) * SEX
V2   = EXP(MU_2 + ETA(2))

MU_3 = LOG(THETA(3))
V3   = EXP(MU_3 + ETA(3))

MU_4 = LOG(THETA(4))
Q    = EXP(MU_4 + ETA(4))

MU_5 = LOG(THETA(5))
KA   = EXP(MU_5 + ETA(5))

K   = CL/V2
K23 = Q /V2
K32 = Q /V3

; Calc TAD
;; initialize for new individual or reset record
IF (NEWIND.LT.2.OR.EVID.EQ.3) THEN
 TDOS=-9999 ; Time of most recent dose. -9999 if no previous dose.
 TAD=0 ; Time After Dose
ENDIF
IF (EVID.EQ.1.OR.EVID.EQ.4) TDOS=TIME
IF (TDOS.GT.-9999) TAD=TIME-TDOS

$DES
DADT(1) =-KA*A(1)                           ; Depot
DADT(2) = KA*A(1) - (K+K23)*A(2) + K32*A(3) ; Central
DADT(3) =              K23 *A(2) - K32*A(3) ; Peripheral

$ERROR
IPRED = (A(2)/V2+.000001)

PROP = IPRED*THETA(6)
ADD  = THETA(7)
SD   = SQRT(PROP*PROP+ADD*ADD)

Y = IPRED + EPS(1)*SD
IRES = DV - IPRED

$THETA  (0,0.1) ; 1 CL
 (0,2) ; 2 V2
 (0,5) ; 3 V3
 (0,0.3) ; 4 Q
 (0,1) ; 5 KA
 (0,0.1) ; 6 Prop err
 0 FIX ; 7 Add err
 0 FIX ; 8 blank
 0 FIX ; 9 blank
 0 FIX ; 10 blank
 0.75 ; 11 WT on CL
 -0.2 ; 12 SEX on V2
$OMEGA  BLOCK(2)
 .1  ;      1 CL_
 .03 .1  ;      2 V2_
$OMEGA  .1  ;      3 V3_
 .1  ;       4 Q_
 .1  ;      5 KA_
$SIGMA  1  FIX
$ESTIMATION METHOD=COND INTERACTION MAXEVAL=9999 NSIG=3 SIGL=10
            PRINT=1 NOTHETABOUNDTEST NOABORT
$COVARIANCE PRINT=E UNCONDITIONAL SIGL=10
$TABLE      ID NMID TIME TAD DV CMT WT SEX AMT EVID ETAS(1:LAST) CL V2
            IPRED CWRES IRES NOPRINT ONEHEADER FILE=run006.tab

NM-TRAN MESSAGES
 WARNINGS AND ERRORS (IF ANY) FOR PROBLEM    1
 (WARNING  2) NM-TRAN INFERS THAT THE DATA ARE POPULATION.
 (MU_WARNING 26) DATA ITEM(S) USED IN DEFINITION OF MU_(S) SHOULD BE CONSTANT FOR INDIV. REC.:
  WT SEX

1NONLINEAR MIXED EFFECTS MODEL PROGRAM (NONMEM) VERSION 7.4.4
 ORIGINALLY DEVELOPED BY STUART BEAL, LEWIS SHEINER, AND ALISON BOECKMANN
 CURRENT DEVELOPERS ARE ROBERT BAUER, ICON DEVELOPMENT SOLUTIONS,
 AND ALISON BOECKMANN. IMPLEMENTATION, EFFICIENCY, AND STANDARDIZATION
 PERFORMED BY NOUS INFOSYSTEMS.
 PROBLEM NO.:         1
 examplomycin
 TOT. NO. OF OBS RECS:      360
 TOT. NO. OF INDIVIDUALS:       40
 GENERAL NONLINEAR KINETICS MODEL WITH STIFF/NONSTIFF EQUATIONS (LSODA, ADVAN13)
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 #TBLN:      1
 #METH: First Order Conditional Estimation with Interaction
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
 #TERM:
0MINIMIZATION SUCCESSFUL
 NO. OF FUNCTION EVALUATIONS USED:      301
 NO. OF SIG. DIGITS IN FINAL EST.:  3.2

 ETABAR IS THE ARITHMETIC MEAN OF THE ETA-ESTIMATES,
 AND THE P-VALUE IS GIVEN FOR THE NULL HYPOTHESIS THAT THE TRUE MEAN IS 0.

 ETABAR:         9.9277E-04 -5.6207E-03  1.5079E-03  4.7040E-03 -6.9528E-03
 SE:             3.3887E-02  2.5763E-02  2.4252E-02  4.6441E-02  4.9069E-02
 N:                      40          40          40          40          40

 P VAL.:         9.7663E-01  8.2730E-01  9.5042E-01  9.1932E-01  8.8732E-01

 ETASHRINKSD(%)  3.5639E-01  8.6019E+00  1.2862E+01  3.7190E+00  5.0438E+00
 ETASHRINKVR(%)  7.1152E-01  1.6464E+01  2.4070E+01  7.2996E+00  9.8332E+00
 EBVSHRINKSD(%)  1.4891E+00  9.5876E+00  1.3192E+01  4.6124E+00  5.9952E+00
 EBVSHRINKVR(%)  2.9561E+00  1.8256E+01  2.4644E+01  9.0120E+00  1.1631E+01
 EPSSHRINKSD(%)  2.6379E+01
 EPSSHRINKVR(%)  4.5800E+01


 TOTAL DATA POINTS NORMALLY DISTRIBUTED (N):          360
 N*LOG(2PI) CONSTANT TO OBJECTIVE FUNCTION:    661.63574390736437
 OBJECTIVE FUNCTION VALUE WITHOUT CONSTANT:    2852.0228210312089
 OBJECTIVE FUNCTION VALUE WITH CONSTANT:       3513.6585649385734
 REPORTED OBJECTIVE FUNCTION DOES NOT CONTAIN CONSTANT

 TOTAL EFFECTIVE ETAS (NIND*NETA):                           200


 #TERE:
 Elapsed estimation  time in seconds:   157.29
 Elapsed covariance  time in seconds:   230.52
 Elapsed postprocess time in seconds:     1.55

 ********************               FIRST ORDER CONDITIONAL ESTIMATION WITH INTERACTION              ********************
 #OBJT:**************                       MINIMUM VALUE OF OBJECTIVE FUNCTION                      ********************
 #OBJV:********************************************     2852.023       **************************************************

 ********************               FIRST ORDER CONDITIONAL ESTIMATION WITH INTERACTION              ********************
 ********************                             FINAL PARAMETER ESTIMATE                           ********************

 THETA - VECTOR OF FIXED EFFECTS PARAMETERS   *********
         TH 1      TH 2      TH 3      TH 4      TH 5      TH 6      TH 7      TH 8      TH 9      TH10      TH11      TH12
         1.31E-01  2.07E+00  4.97E+00  2.90E-01  1.12E+00  4.86E-02  0.00E+00  0.00E+00  0.00E+00  0.00E+00  7.57E-01 -1.56E-01

 OMEGA - COV MATRIX FOR RANDOM EFFECTS - ETAS  ********
         ETA1      ETA2      ETA3      ETA4      ETA5
 ETA1
+        4.74E-02
 ETA2
+        2.45E-02  3.26E-02
 ETA3
+        0.00E+00  0.00E+00  3.18E-02
 ETA4
+        0.00E+00  0.00E+00  0.00E+00  9.54E-02
 ETA5
+        0.00E+00  0.00E+00  0.00E+00  0.00E+00  1.10E-01

 SIGMA - COV MATRIX FOR RANDOM EFFECTS - EPSILONS  ****
         EPS1
 EPS1
+        1.00E+00

 OMEGA - CORR MATRIX FOR RANDOM EFFECTS - ETAS  *******
         ETA1      ETA2      ETA3      ETA4      ETA5
 ETA1
+        2.18E-01
 ETA2
+        6.24E-01  1.81E-01
 ETA3
+        0.00E+00  0.00E+00  1.78E-01
 ETA4
+        0.00E+00  0.00E+00  0.00E+00  3.09E-01
 ETA5
+        0.00E+00  0.00E+00  0.00E+00  0.00E+00  3.31E-01

 SIGMA - CORR MATRIX FOR RANDOM EFFECTS - EPSILONS  ***
         EPS1
 EPS1
+        1.00E+00

 ********************               FIRST ORDER CONDITIONAL ESTIMATION WITH INTERACTION              ********************
 ********************                            STANDARD ERROR OF ESTIMATE                          ********************

 THETA - VECTOR OF FIXED EFFECTS PARAMETERS   *********
         TH 1      TH 2      TH 3      TH 4      TH 5      TH 6      TH 7      TH 8      TH 9      TH10      TH11      TH12
         4.89E-03  9.75E-02  1.60E-01  1.34E-02  6.13E-02  4.08E-04 ......... ......... ......... .........  1.11E-01  5.66E-02

 OMEGA - COV MATRIX FOR RANDOM EFFECTS - ETAS  ********
         ETA1      ETA2      ETA3      ETA4      ETA5
 ETA1
+        1.08E-02
 ETA2
+        7.98E-03  8.79E-03
 ETA3
+       ......... .........  6.69E-03
 ETA4
+       ......... ......... .........  2.52E-02
 ETA5
+       ......... ......... ......... .........  3.44E-02

 SIGMA - COV MATRIX FOR RANDOM EFFECTS - EPSILONS  ****
         EPS1
 EPS1
+       .........

 OMEGA - CORR MATRIX FOR RANDOM EFFECTS - ETAS  *******
         ETA1      ETA2      ETA3      ETA4      ETA5
 ETA1
+        2.49E-02
 ETA2
+        1.21E-01  2.43E-02
 ETA3
+       ......... .........  1.88E-02
 ETA4
+       ......... ......... .........  4.08E-02
 ETA5
+       ......... ......... ......... .........  5.19E-02

 SIGMA - CORR MATRIX FOR RANDOM EFFECTS - EPSILONS  ***
         EPS1
 EPS1
+       .........
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
 ********************               FIRST ORDER CONDITIONAL ESTIMATION WITH INTERACTION              ********************
 ********************                      EIGENVALUES OF COR MATRIX OF ESTIMATE                     ********************

             1         2         3         4         5         6         7         8         9        10        11        12
             13        14
         8.24E-02  1.01E-01  2.27E-01  4.09E-01  4.24E-01  6.00E-01  6.92E-01  8.55E-01  1.05E+00  1.36E+00  1.51E+00  1.66E+00
          2.22E+00  2.82E+00
 Elapsed finaloutput time in seconds:     0.04
 #CPUT: Total CPU Time in Seconds,      390.184
