Wed Jul  8 19:18:19 PDT 2020
;; 1. Based on: run006
;; 2. Description: Model 6 - 2cmt model with covariates
;; x1. Author: user
; Reference:
; Nonlinear Mixed‐Effects Model Development and Simulation Using nlmixr and Related R Open‐Source Packages
; https://doi.org/10.1002/psp4.12445
$PROBLEM    examplomycin
$INPUT      ID TIME DV CMT WT SEX AMT EVID PHASE=DROP
$DATA      examplomycin2.csv IGNORE=@
$SUBROUTINE ADVAN13 TOL=9
$MODEL      NCOMP=3
$PK
NMID = ID

; Covariates
WT2 = WT
IF(WT.LE.0) WT2 = 70

MU_1 = LOG(THETA(1)) + THETA(11) * LOG(WT2/70)
CL   = EXP(MU_1 + ETA(1))

MU_2 = LOG(THETA(2)) + THETA(12) * SEX
V2   = EXP(MU_2 + ETA(2))

MU_3 = LOG(THETA(3))
V3   = EXP(MU_3 + ETA(3))

MU_4 = LOG(THETA(4))
Q    = EXP(MU_4 + ETA(4))

MU_5 = LOG(THETA(5))
KA   = EXP(MU_5 + ETA(5))

K   = CL/V2
K23 = Q /V2
K32 = Q /V3

; Calc TAD
;; initialize for new individual or reset record
IF (NEWIND.LT.2.OR.EVID.EQ.3) THEN
 TDOS=-9999 ; Time of most recent dose. -9999 if no previous dose.
 TAD=0 ; Time After Dose
ENDIF
IF (EVID.EQ.1.OR.EVID.EQ.4) TDOS=TIME
IF (TDOS.GT.-9999) TAD=TIME-TDOS

$DES
DADT(1) =-KA*A(1)                           ; Depot
DADT(2) = KA*A(1) - (K+K23)*A(2) + K32*A(3) ; Central
DADT(3) =              K23 *A(2) - K32*A(3) ; Peripheral

$ERROR
IPRED = (A(2)/V2+.000001)

PROP = IPRED*THETA(6)
ADD  = THETA(7)
SD   = SQRT(PROP*PROP+ADD*ADD)

Y = IPRED + EPS(1)*SD
IRES = DV - IPRED

$THETA  (0,0.131) FIX ; 1 CL
 (0,2.07) FIX ; 2 V2
 (0,4.97) FIX ; 3 V3
 (0,0.29) FIX ; 4 Q
 (0,1.12) FIX ; 5 KA
 (0,0.0486) FIX ; 6 Prop err
 0 FIX ; 7 Add err
 0 FIX ; 8 blank
 0 FIX ; 9 blank
 0 FIX ; 10 blank
 0.757 FIX ; 11 WT on CL
 -0.156 FIX ; 12 SEX on V2
$OMEGA  BLOCK(2)
 0.0474  ;      1 CL_
 0.0245 0.0326  ;      2 V2_
$OMEGA  0.0318  FIX  ;      3 V3_
 0.0954  FIX  ;       4 Q_
 0.11  FIX  ;      5 KA_
$SIGMA  1  FIX
$SIMULATION (12345) (54321) ONLYSIM SUBPROB=500
; $ESTIMATION METHOD=COND INTERACTION MAXEVAL=9999 NSIG=3 SIGL=10

; PRINT=1 NOTHETABOUNDTEST NOABORT

; $COVARIANCE PRINT=E UNCONDITIONAL SIGL=10

;
$TABLE      ID NMID TIME DV IPRED CMT WT SEX AMT EVID NOPRINT
            ONEHEADER FILE=run006_sim.tab

NM-TRAN MESSAGES
 WARNINGS AND ERRORS (IF ANY) FOR PROBLEM    1
 (WARNING  2) NM-TRAN INFERS THAT THE DATA ARE POPULATION.
 (MU_WARNING 26) DATA ITEM(S) USED IN DEFINITION OF MU_(S) SHOULD BE CONSTANT FOR INDIV. REC.:
  WT SEX

1NONLINEAR MIXED EFFECTS MODEL PROGRAM (NONMEM) VERSION 7.4.4
 ORIGINALLY DEVELOPED BY STUART BEAL, LEWIS SHEINER, AND ALISON BOECKMANN
 CURRENT DEVELOPERS ARE ROBERT BAUER, ICON DEVELOPMENT SOLUTIONS,
 AND ALISON BOECKMANN. IMPLEMENTATION, EFFICIENCY, AND STANDARDIZATION
 PERFORMED BY NOUS INFOSYSTEMS.
 PROBLEM NO.:         1
 examplomycin
 TOT. NO. OF OBS RECS:      360
 TOT. NO. OF INDIVIDUALS:       40
 GENERAL NONLINEAR KINETICS MODEL WITH STIFF/NONSTIFF EQUATIONS (LSODA, ADVAN13)
 PROBLEM NO.:           1      SUBPROBLEM NO.:           1
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 SIMULATION STEP PERFORMED
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 Elapsed simulation  time in seconds:     0.02
 Elapsed finaloutput time in seconds:     0.02
 PROBLEM NO.:           1      SUBPROBLEM NO.:           2
 SIMULATION STEP PERFORMED
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 Elapsed simulation  time in seconds:     0.02
 Elapsed finaloutput time in seconds:     0.02
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 #CPUT: Total CPU Time in Seconds,       61.134
